# OpenSim document version 40000
AnalyzeTool StaticOptimization:
  model_file: ./Model_Scaled_LQL.osim
  replace_force_set: false
  output_precision: 8
  initial_time: 0
  final_time: 0.1
  solve_for_equilibrium_for_auxiliary_states: false
  maximum_number_of_integrator_steps: 20000
  maximum_integrator_step_size: 1
  minimum_integrator_step_size: 1e-8
  integrator_error_tolerance: 1e-5
  coordinates_file: ./data/coordinates.mot
  lowpass_cutoff_frequency_for_coordinates: 6
  AnalysisSet Analyses:
    StaticOptimization: start_time=0 end_time=0.1 step_interval=1 in_degrees=false use_model_force_set=true
        activation_exponent=2 use_muscle_physiology=true optimizer_convergence_criterion=0.0001
        optimizer_max_iterations=1000
